units                   real
atom_style              charge
boundary                f f f

processors		* * 1
region		        sim_space block -8 320 -8 320 -50 50 units box
create_box	        1 sim_space


# Create graphene sheet
region                  graphene_space block -5 160 -5 160 -3 3 units box
read_dump               structures/30nm_30nm_graphene.what 0 x y z box no add yes
group                   graphene region graphene_space

# Mass of carbon
mass                    1 12.01

# Insert C60 object
molecule		C60 C60.mol
region                  fulleren_space sphere 140 140 -10 5 units box
create_atoms		0 single 140 140 -10 mol C60 123 units box
group                   fulleren region fulleren_space

# Insert another C60 object
region                  b_fulleren_space sphere 160 160 -10 5 units box
create_atoms		0 single 160 160 -10 mol C60 123 units box
group                   b_fulleren region b_fulleren_space

# Make membrane circular
region                  notDel sphere 150 150 0 150 units box
group			notDel region notDel
group			del subtract all notDel

delete_atoms		group del

# That would be a fullerenic crystal
# create_atoms		0 region sim_space mol C60 123 units box

# Potential settings
# FIXME *neighbor bin* stopped working for some reason
neighbor        	1.0 bin
neigh_modify    	every 1 delay 0

# Type of potential?
pair_style              reax/c NULL
pair_coeff              * * ffield.reax.cho C
#pair_style              hybrid reax/c NULL lj/cut 5.

#pair_coeff              * * reax/c ffield.reax.cho NULL C
#pair_coeff		1 2 lj/cut  0.010832 3.345 10
#pair_coeff		1 1 lj/cut  0.010832 1.445 10


dump			MyDump all custom 20 pilotwave.lammpstrj element x y z
dump_modify		MyDump sort id element C

thermo                  50


# Obligatory fix
fix                     NVE all nve

# Carbon - carbon potential is here
fix                     1 all qeq/reax 1 0.0 10.0 1e-6 reax/c

# Add harmonic response from the graphene

# Stabilize the graphene sheet
#fix                     controltemp graphene langevin 10.0 10.1 50.0 48279

# Also add initial push to give some momentum to the fulerenes
# fix                     pushball fulleren addforce 0.2 0.2 0.0
# fix                     b_pushball b_fulleren addforce -0.2 -0.2 0.0

#run                     1000

# Turn off gravity
# unfix                   pushball

# Turn off temperature controll (graphene is stable now)
#unfix                   controltemp

# Add gravity fixed to the ball

# Add gravity fixed to the second ball
#fix                     b_gravity b_fulleren addforce 0.0 0.0 2.22

# See what gives


# APPLAY PERIODIC FORCE

fix                     gravity fulleren addforce 0.0 0.0 0.6
fix                     b_gravity b_fulleren addforce 0.0 0.0 0.6
timestep                0.5
variable		sinForce equal swiggle(0,0.5,1200)

fix                     4 graphene spring/self 1.0 xyz
fix                     wavee graphene addforce 0.0 0.0 v_sinForce


fix			vis all viscous 200

run			500

fix			vis all viscous 10

run                     500000
